# OpenSim document version 10902
Model DAS3:
  gravity: 0 -9.80665 0
  defaults: Thelen2003Muscle default: min_control=0.01 max_control=1 max_isometric_force=0.001 optimal_fiber_length=10
      tendon_slack_length=1 pennation_angle=0 activation_time_constant=0.01 deactivation_time_constant=0.04 Vmax=10
      Vmax0=5 FmaxTendonStrain=0.033 FmaxMuscleStrain=0.6 KshapeActive=0.5 KshapePassive=4 damping=0.1 Af=0.3 Flen=1.8
  ForceSet:
    ObjectGroup trapezoid: members=trapezoid
    ObjectGroup costoclav: members=(costoclav_1 costoclav_2 costoclav_3)
    ObjectGroup sternoclav: members=(sternoclav_1 sternoclav_2)
    ObjectGroup glenohum: members=(glenohum_1 glenohum_2 glenohum_3 glenohum_4 glenohum_5 glenohum_6)
    ObjectGroup trap_scap: members=(trap_scap10 trap_scap11 trap_scap_1 trap_scap_2 trap_scap_3 trap_scap_4 trap_scap_5 trap_scap_6 trap_scap_7 trap_scap_8 trap_scap_9)
    ObjectGroup trap_clav: members=(trap_clav_1 trap_clav_2)
    ObjectGroup lev_scap: members=(lev_scap_1 lev_scap_2)
    ObjectGroup pect_min: members=(pect_min_1 pect_min_2 pect_min_3 pect_min_4)
    ObjectGroup rhomboid: members=(rhomboid_1 rhomboid_2 rhomboid_3 rhomboid_4 rhomboid_5)
    ObjectGroup serr_ant: members=(serr_ant10 serr_ant11 serr_ant12 serr_ant_1 serr_ant_2 serr_ant_3 serr_ant_4 serr_ant_5 serr_ant_6 serr_ant_7 serr_ant_8 serr_ant_9)
    ObjectGroup delt_scap: members=(delt_scap10 delt_scap11 delt_scap_1 delt_scap_2 delt_scap_3 delt_scap_4 delt_scap_5 delt_scap_6 delt_scap_7 delt_scap_8 delt_scap_9)
    ObjectGroup delt_clav: members=(delt_clav_1 delt_clav_2 delt_clav_3 delt_clav_4)
    ObjectGroup coracobr: members=(coracobr_1 coracobr_2 coracobr_3)
    ObjectGroup infra: members=(infra_1 infra_2 infra_3 infra_4 infra_5 infra_6)
    ObjectGroup ter_min: members=(ter_min_1 ter_min_2 ter_min_3)
    ObjectGroup ter_maj: members=(ter_maj_1 ter_maj_2 ter_maj_3 ter_maj_4)
    ObjectGroup supra: members=(supra_1 supra_2 supra_3 supra_4)
    ObjectGroup subscap: members=(subscap10 subscap11 subscap_1 subscap_2 subscap_3 subscap_4 subscap_5 subscap_6 subscap_7 subscap_8 subscap_9)
    ObjectGroup bic_c_l: members=bic_l
    ObjectGroup bic_c_b: members=(bic_b_1 bic_b_2)
    ObjectGroup triceps: members=(tric_long_1 tric_long_2 tric_long_3 tric_long_4)
    ObjectGroup lat_dorsi: members=(lat_dorsi_1 lat_dorsi_2 lat_dorsi_3 lat_dorsi_4 lat_dorsi_5 lat_dorsi_6)
    ObjectGroup pect_maj_t: members=(pect_maj_t_1 pect_maj_t_2 pect_maj_t_3 pect_maj_t_4 pect_maj_t_5 pect_maj_t_6)
    ObjectGroup pect_maj_c: members=(pect_maj_c_1 pect_maj_c_2)
    ObjectGroup tric_med: members=(tric_med_1 tric_med_2 tric_med_3 tric_med_4 tric_med_5)
    ObjectGroup brachialis: members=(brachialis_1 brachialis_2 brachialis_3 brachialis_4 brachialis_5 brachialis_6 brachialis_7)
    ObjectGroup brachiorad: members=(brachiorad_1 brachiorad_2 brachiorad_3)
    ObjectGroup pron_teres_hr: members=pron_teres_1
    ObjectGroup pron_teres_ur: members=pron_teres_2
    ObjectGroup supinator_ur: members=(supinator_1 supinator_2 supinator_3 supinator_4 supinator_5)
    ObjectGroup pron_quad: members=(pron_quad_1 pron_quad_2 pron_quad_3)
    ObjectGroup tric_lat: members=(tric_lat_1 tric_lat_2 tric_lat_3 tric_lat_4 tric_lat_5)
    ObjectGroup anconeus: members=(anconeus_1 anconeus_2 anconeus_3 anconeus_4 anconeus_5)
    Thelen2003Muscle trapezoid: optimal_fiber_length=0.001
      PathPoint P1: clavicle_r (0.14748 0.01308 0.01049)
      PathPoint P2: scapula_r (-0.03662 0.01182 -0.06053)
    Thelen2003Muscle costoclav_1: optimal_fiber_length=0.001
      PathPoint P1: thorax (0.0502 -0.0018 0.0238)
      PathPoint P2: clavicle_r (0.0549 0.0043 0.00197)
    Thelen2003Muscle costoclav_2: optimal_fiber_length=0.001
      PathPoint P1: thorax (0.0384 -0.0076 0.0162)
      PathPoint P2: clavicle_r (0.04201 0.0025 0.00248)
    Thelen2003Muscle costoclav_3: optimal_fiber_length=0.001
      PathPoint P1: thorax (0.0334 -0.0125 0.018)
      PathPoint P2: clavicle_r (0.03412 -0.00427 0.01114)
    Thelen2003Muscle sternoclav_1: optimal_fiber_length=0.001
      PathPoint P1: thorax (0.007 -0.002 0.0084)
      PathPoint P2: clavicle_r (0.02748 0.0193 0.01589)
    Thelen2003Muscle sternoclav_2: optimal_fiber_length=0.001
      PathPoint P1: thorax (0.0002 -0.0005 0.0175)
      PathPoint P2: clavicle_r (0.02748 0.0193 0.01589)
    Thelen2003Muscle glenohum_1: optimal_fiber_length=0.001
      PathPoint P1: scapula_r (-0.01342 -0.02775 -0.026)
      PathPoint P2: humerus_r (0.00192 -0.0169 0.01468)
    Thelen2003Muscle glenohum_2: optimal_fiber_length=0.001
      PathPoint P1: scapula_r (-0.02261 -0.00741 -0.02914)
      PathPoint P2: humerus_r (0.01181 0.02038 0.00774)
    Thelen2003Muscle glenohum_3: optimal_fiber_length=0.001
      PathPoint P1: scapula_r (-0.01921 0.00808 -0.06658)
      PathPoint P2: humerus_r (0.01688 0.01906 -0.0133)
    Thelen2003Muscle glenohum_4: optimal_fiber_length=0.001
      PathPoint P1: scapula_r (-0.01891 -0.00134 -0.05657)
      PathPoint P2: humerus_r (-0.00956 0.00038 -0.02105)
    Thelen2003Muscle glenohum_5: optimal_fiber_length=0.001
      PathPoint P1: scapula_r (-0.02001 -0.02537 -0.05486)
      PathPoint P2: humerus_r (-0.01077 -0.02329 -0.00787)
    Thelen2003Muscle glenohum_6: optimal_fiber_length=0.001
      PathPoint P1: scapula_r (-0.02001 -0.02537 -0.05486)
      PathPoint P2: humerus_r (-0.00663 -0.03188 0.00908)
    Thelen2003Muscle trap_scap_1: max_isometric_force=118 optimal_fiber_length=0.1446 tendon_slack_length=0.003
        pennation_angle=0 activation1=50.75286 activation2=18.69159 mass=0.01954
      PathPoint P1: thorax (-0.0081 0.0534 0.1141)
      PathPoint P2: scapula_r (-0.01482 0.01733 -0.01452)
    Thelen2003Muscle trap_scap_2: max_isometric_force=168 optimal_fiber_length=0.1127 tendon_slack_length=0.027
        pennation_angle=0 activation1=50.75286 activation2=18.69159 mass=0.02161
      PathPoint P1: thorax (-0.008 0.0505 0.1153)
      PathPoint P2: scapula_r (-0.03311 0.01575 -0.00284)
    Thelen2003Muscle trap_scap_3: max_isometric_force=199 optimal_fiber_length=0.107 tendon_slack_length=0.054
        pennation_angle=0 activation1=50.75286 activation2=18.69159 mass=0.02419
      PathPoint P1: thorax (-0.0043 0.0425 0.1178)
      PathPoint P2: scapula_r (-0.05597 0.01287 -0.00113)
    Thelen2003Muscle trap_scap_4: max_isometric_force=138 optimal_fiber_length=0.0952 tendon_slack_length=0.053
        pennation_angle=0 activation1=50.75286 activation2=18.69159 mass=0.01494
      PathPoint P1: thorax (-0.0037 0.0372 0.1214)
      PathPoint P2: scapula_r (-0.0689 0.0119 -0.00094)
    Thelen2003Muscle trap_scap_5: max_isometric_force=122 optimal_fiber_length=0.0924 tendon_slack_length=0.035
        pennation_angle=0 activation1=50.75286 activation2=18.69159 mass=0.0128
      PathPoint P1: thorax (-0.0031 0.0261 0.125)
      PathPoint P2: scapula_r (-0.07607 0.01365 -0.00674)
    Thelen2003Muscle trap_scap_6: max_isometric_force=101 optimal_fiber_length=0.0893 tendon_slack_length=0.033
        pennation_angle=0 activation1=50.75286 activation2=18.69159 mass=0.01025
      PathPoint P1: thorax (-0.0043 -0.0002 0.1363)
      PathPoint P2: scapula_r (-0.06821 0.00723 0.00277)
    Thelen2003Muscle trap_scap_7: max_isometric_force=97 optimal_fiber_length=0.0868 tendon_slack_length=0.036
        pennation_angle=0 activation1=50.75286 activation2=18.69159 mass=0.00958
      PathPoint P1: thorax (-0.0016 -0.0339 0.1469)
      PathPoint P2: scapula_r (-0.07607 0.01365 -0.00674)
    Thelen2003Muscle trap_scap_8: max_isometric_force=138 optimal_fiber_length=0.077 tendon_slack_length=0.048
        pennation_angle=0 activation1=50.75286 activation2=18.69159 mass=0.01212
      PathPoint P1: thorax (0.0037 -0.0629 0.1511)
      PathPoint P2: scapula_r (-0.07521 0.00876 0.00091)
    Thelen2003Muscle trap_scap_9: max_isometric_force=123 optimal_fiber_length=0.1011 tendon_slack_length=0.034
        pennation_angle=0 activation1=50.75286 activation2=18.69159 mass=0.01416
      PathPoint P1: thorax (0.0066 -0.1109 0.1522)
      PathPoint P2: scapula_r (-0.09384 0.01027 -0.00611)
    Thelen2003Muscle trap_scap10: max_isometric_force=81 optimal_fiber_length=0.1264 tendon_slack_length=0.035
        pennation_angle=0 activation1=50.75286 activation2=18.69159 mass=0.01158
      PathPoint P1: thorax (0.0102 -0.1479 0.154)
      PathPoint P2: scapula_r (-0.08906 0.00467 -0.00174)
    Thelen2003Muscle trap_scap11: max_isometric_force=92 optimal_fiber_length=0.1355 tendon_slack_length=0.031
        pennation_angle=0 activation1=50.75286 activation2=18.69159 mass=0.01407
      PathPoint P1: thorax (0.0135 -0.1794 0.1477)
      PathPoint P2: scapula_r (-0.08263 0.00349 0.00054)
    Thelen2003Muscle trap_clav_1: max_isometric_force=97 optimal_fiber_length=0.1547 tendon_slack_length=0.047
        pennation_angle=0 activation1=50.75286 activation2=18.69159 mass=0.01712
      PathPoint P1: thorax (-0.0097 0.1294 0.1124)
      PathPoint P2: clavicle_r (0.13361 0.02689 0.01208)
    Thelen2003Muscle trap_clav_2: max_isometric_force=47 optimal_fiber_length=0.168 tendon_slack_length=0.042
        pennation_angle=0 activation1=116.1091 activation2=28.81844 mass=0.00969
      PathPoint P1: thorax (-0.0106 0.0717 0.1066)
      PathPoint P2: clavicle_r (0.16007 0.02487 0.01214)
    Thelen2003Muscle lev_scap_1: max_isometric_force=96 optimal_fiber_length=0.1578 tendon_slack_length=0.019
        pennation_angle=0 activation1=116.1091 activation2=28.81844 mass=0.01731
      PathPoint P1: thorax (0.0388 0.1479 0.0572)
      PathPoint P2: scapula_r (-0.11566 0.01242 -0.01347)
    Thelen2003Muscle lev_scap_2: max_isometric_force=104 optimal_fiber_length=0.1302 tendon_slack_length=0.018
        pennation_angle=0 activation1=116.1091 activation2=28.81844 mass=0.01544
      PathPoint P1: thorax (0.0291 0.1254 0.0607)
      PathPoint P2: scapula_r (-0.10894 0.02469 -0.02061)
    Thelen2003Muscle pect_min_1: max_isometric_force=47 optimal_fiber_length=0.0765 tendon_slack_length=0.051
        pennation_angle=0 activation1=48.48485 activation2=18.18182 mass=0.00407
      PathPoint P1: thorax (0.0513 -0.0606 -0.018)
      PathPoint P2: scapula_r (-0.02865 0.00263 -0.08001)
    Thelen2003Muscle pect_min_2: max_isometric_force=107 optimal_fiber_length=0.1086 tendon_slack_length=0.041
        pennation_angle=0 activation1=48.48485 activation2=18.18182 mass=0.01323
      PathPoint P1: thorax (0.0585 -0.0933 -0.0267)
      PathPoint P2: scapula_r (-0.02865 0.00263 -0.08001)
    Thelen2003Muscle pect_min_3: max_isometric_force=107 optimal_fiber_length=0.1075 tendon_slack_length=0.029
        pennation_angle=0 activation1=48.48485 activation2=18.18182 mass=0.01303
      PathPoint P1: thorax (0.0965 -0.0947 -0.0203)
      PathPoint P2: scapula_r (-0.02443 -0.00347 -0.08275)
    Thelen2003Muscle pect_min_4: max_isometric_force=46 optimal_fiber_length=0.1381 tendon_slack_length=0.026
        pennation_angle=0 activation1=48.48485 activation2=18.18182 mass=0.0072
      PathPoint P1: thorax (0.0886 -0.1138 -0.0243)
      PathPoint P2: scapula_r (-0.01988 -0.01163 -0.08395)
    Thelen2003Muscle rhomboid_1: max_isometric_force=51 optimal_fiber_length=0.0986 tendon_slack_length=0.015
        pennation_angle=0 activation1=93.07359 activation2=25.97403 mass=0.00575
      PathPoint P1: thorax (-0.0091 0.0627 0.108)
      PathPoint P2: scapula_r (-0.11708 -0.00421 -0.01182)
    Thelen2003Muscle rhomboid_2: max_isometric_force=92 optimal_fiber_length=0.1077 tendon_slack_length=0.066
        pennation_angle=0 activation1=93.07359 activation2=25.97403 mass=0.0113
      PathPoint P1: thorax (-0.0076 0.0506 0.1151)
      PathPoint P2: scapula_r (-0.12616 -0.07524 -0.00581)
    Thelen2003Muscle rhomboid_3: max_isometric_force=142 optimal_fiber_length=0.1259 tendon_slack_length=0.032
        pennation_angle=0 activation1=93.07359 activation2=25.97403 mass=0.02034
      PathPoint P1: thorax (0.0054 0.0317 0.1252)
      PathPoint P2: scapula_r (-0.12743 -0.08059 -0.00522)
    Thelen2003Muscle rhomboid_4: max_isometric_force=82 optimal_fiber_length=0.1267 tendon_slack_length=0.031
        pennation_angle=0 activation1=116.1091 activation2=28.81844 mass=0.01176
      PathPoint P1: thorax (-0.0028 0.0068 0.1348)
      PathPoint P2: scapula_r (-0.12703 -0.09269 -0.00503)
    Thelen2003Muscle rhomboid_5: max_isometric_force=67 optimal_fiber_length=0.117 tendon_slack_length=0.04
        pennation_angle=0 activation1=116.1091 activation2=28.81844 mass=0.00885
      PathPoint P1: thorax (0.0005 -0.02 0.1449)
      PathPoint P2: scapula_r (-0.12594 -0.10446 -0.00717)
    Thelen2003Muscle serr_ant_1: max_isometric_force=61 optimal_fiber_length=0.1635 tendon_slack_length=0.025
        pennation_angle=0 activation1=116.1091 activation2=28.81844 mass=0.01139
      PathPoint P1: scapula_r (-0.12524 -0.11029 0.00606)
      PathPoint P2: thorax (0.138 -0.2098 0.0353)
      PathWrap: wrap_object=serr_ant method=hybrid
    Thelen2003Muscle serr_ant_2: max_isometric_force=110 optimal_fiber_length=0.1667 tendon_slack_length=0.009
        pennation_angle=0 activation1=116.1091 activation2=28.81844 mass=0.02083
      PathPoint P1: scapula_r (-0.1232 -0.10995 0.00518)
      PathPoint P2: thorax (0.1327 -0.1884 0.0149)
      PathWrap: wrap_object=serr_ant method=hybrid
    Thelen2003Muscle serr_ant_3: max_isometric_force=105 optimal_fiber_length=0.1622 tendon_slack_length=0.007
        pennation_angle=0 activation1=116.1091 activation2=28.81844 mass=0.01925
      PathPoint P1: scapula_r (-0.11852 -0.1073 0.00372)
      PathPoint P2: thorax (0.1242 -0.159 0.0024)
      PathWrap: wrap_object=serr_ant method=hybrid
    Thelen2003Muscle serr_ant_4: max_isometric_force=110 optimal_fiber_length=0.1289 tendon_slack_length=0
        pennation_angle=0 activation1=116.1091 activation2=28.81844 mass=0.01629
      PathPoint P1: scapula_r (-0.11627 -0.10348 0.00303)
      PathPoint P2: thorax (0.1231 -0.1221 -0.0031)
      PathWrap: wrap_object=serr_ant method=hybrid
    Thelen2003Muscle serr_ant_5: max_isometric_force=64 optimal_fiber_length=0.1259 tendon_slack_length=0.011
        pennation_angle=0 activation1=25.90274 activation2=11.97605 mass=0.00909
      PathPoint P1: scapula_r (-0.11727 -0.09968 0.00318)
      PathPoint P2: thorax (0.1194 -0.0859 0.0041)
      PathWrap: wrap_object=serr_ant method=hybrid
    Thelen2003Muscle serr_ant_6: max_isometric_force=97 optimal_fiber_length=0.122 tendon_slack_length=0
        pennation_angle=0 activation1=25.90274 activation2=11.97605 mass=0.01345
      PathPoint P1: scapula_r (-0.1145 -0.09435 0.0022)
      PathPoint P2: thorax (0.1124 -0.0428 0.0199)
      PathWrap: wrap_object=serr_ant method=hybrid
    Thelen2003Muscle serr_ant_7: max_isometric_force=47 optimal_fiber_length=0.1133 tendon_slack_length=0.009
        pennation_angle=0 activation1=25.90274 activation2=11.97605 mass=0.00609
      PathPoint P1: scapula_r (-0.10351 -0.05008 -0.0046)
      PathPoint P2: thorax (0.1001 -0.0077 0.0329)
      PathWrap: wrap_object=serr_ant method=hybrid
    Thelen2003Muscle serr_ant_8: max_isometric_force=76 optimal_fiber_length=0.0845 tendon_slack_length=0.011
        pennation_angle=0 activation1=25.90274 activation2=11.97605 mass=0.00729
      PathPoint P1: scapula_r (-0.11794 -0.01928 -0.00632)
      PathPoint P2: thorax (0.101 0.0023 0.0552)
      PathWrap: wrap_object=serr_ant method=hybrid
    Thelen2003Muscle serr_ant_9: max_isometric_force=79 optimal_fiber_length=0.08 tendon_slack_length=0.007
        pennation_angle=0 activation1=25.90274 activation2=11.97605 mass=0.00724
      PathPoint P1: scapula_r (-0.11491 0.01015 -0.01737)
      PathPoint P2: thorax (0.098 0.0062 0.0546)
      PathWrap: wrap_object=serr_ant method=hybrid
    Thelen2003Muscle serr_ant10: max_isometric_force=63 optimal_fiber_length=0.066 tendon_slack_length=0.005
        pennation_angle=0 activation1=25.90274 activation2=11.97605 mass=0.00476
      PathPoint P1: scapula_r (-0.10664 0.02315 -0.02602)
      PathPoint P2: thorax (0.0944 0.0109 0.0595)
      PathWrap: wrap_object=serr_ant method=hybrid
    Thelen2003Muscle serr_ant11: max_isometric_force=23 optimal_fiber_length=0.0885 tendon_slack_length=0
        pennation_angle=0 activation1=25.90274 activation2=11.97605 mass=0.00229
      PathPoint P1: scapula_r (-0.10125 0.03015 -0.03225)
      PathPoint P2: thorax (0.098 0.0062 0.0546)
      PathWrap: wrap_object=serr_ant method=hybrid
    Thelen2003Muscle serr_ant12: max_isometric_force=112 optimal_fiber_length=0.0945 tendon_slack_length=0
        pennation_angle=0 activation1=25.90274 activation2=11.97605 mass=0.01212
      PathPoint P1: scapula_r (-0.0888 0.0352 -0.04441)
      PathPoint P2: thorax (0.1005 0.0009 0.047)
      PathWrap: wrap_object=serr_ant method=hybrid
    Thelen2003Muscle delt_scap_1: max_isometric_force=289 optimal_fiber_length=0.1128 tendon_slack_length=0.08
        pennation_angle=0.08726646 activation1=25.90274 activation2=11.97605 mass=0.03703
      PathPoint P1: scapula_r (-0.08278 -0.00082 -0.00086)
      PathPoint P2: humerus_r (0.01347 -0.11128 0.00919)
      PathWrap: wrap_object=deltoid
    Thelen2003Muscle delt_scap_2: max_isometric_force=211 optimal_fiber_length=0.0949 tendon_slack_length=0.076
        pennation_angle=0.08726646 activation1=25.90274 activation2=11.97605 mass=0.02269
      PathPoint P1: scapula_r (-0.04999 0.00627 0.00113)
      PathPoint P2: humerus_r (0.01555 -0.09645 0.00528)
      PathWrap: wrap_object=deltoid
    Thelen2003Muscle delt_scap_3: max_isometric_force=446 optimal_fiber_length=0.0833 tendon_slack_length=0.062
        pennation_angle=0.08726646 activation1=25.90274 activation2=11.97605 mass=0.04214
      PathPoint P1: scapula_r (-0.01438 0.00574 -0.00141)
      PathPoint P2: humerus_r (0.01555 -0.09645 0.00528)
      PathWrap: wrap_object=deltoid
    Thelen2003Muscle delt_scap_4: max_isometric_force=117 optimal_fiber_length=0.0666 tendon_slack_length=0.045
        pennation_angle=0.08726646 activation1=25.90274 activation2=11.97605 mass=0.00888
      PathPoint P1: scapula_r (-0.003 -0.00452 -0.00481)
      PathPoint P2: humerus_r (0.01571 -0.08467 0.00404)
      PathWrap: wrap_object=deltoid
    Thelen2003Muscle delt_scap_5: max_isometric_force=120 optimal_fiber_length=0.0656 tendon_slack_length=0.035
        pennation_angle=0.08726646 activation1=120.0992 activation2=29.15452 mass=0.00891
      PathPoint P1: scapula_r (0.01299 0.00078 -0.01734)
      PathPoint P2: humerus_r (0.01678 -0.07782 0.00066)
      PathWrap: wrap_object=deltoid
    Thelen2003Muscle delt_scap_6: max_isometric_force=285 optimal_fiber_length=0.0767 tendon_slack_length=0.067
        pennation_angle=0.08726646 activation1=120.0992 activation2=29.15452 mass=0.02485
      PathPoint P1: scapula_r (0.00362 0.00532 -0.00502)
      PathPoint P2: humerus_r (0.01646 -0.10894 0.00661)
      PathWrap: wrap_object=deltoid
    Thelen2003Muscle delt_scap_7: max_isometric_force=149 optimal_fiber_length=0.0754 tendon_slack_length=0.082
        pennation_angle=0.08726646 activation1=120.0992 activation2=29.15452 mass=0.01275
      PathPoint P1: scapula_r (0.00849 0.00027 -0.00918)
      PathPoint P2: humerus_r (0.01579 -0.1316 0.00516)
      PathWrap: wrap_object=deltoid
    Thelen2003Muscle delt_scap_8: max_isometric_force=215 optimal_fiber_length=0.071 tendon_slack_length=0.065
        pennation_angle=0.08726646 activation1=120.0992 activation2=29.15452 mass=0.0173
      PathPoint P1: scapula_r (0.01412 0.00617 -0.0181)
      PathPoint P2: humerus_r (0.01646 -0.10894 0.00661)
      PathWrap: wrap_object=deltoid
    Thelen2003Muscle delt_scap_9: max_isometric_force=286 optimal_fiber_length=0.0732 tendon_slack_length=0.071
        pennation_angle=0.08726646 activation1=120.0992 activation2=29.15452 mass=0.02378
      PathPoint P1: scapula_r (0.01569 0.0048 -0.02414)
      PathPoint P2: humerus_r (0.01847 -0.11738 -0.00494)
      PathWrap: wrap_object=deltoid
    Thelen2003Muscle delt_scap10: max_isometric_force=445 optimal_fiber_length=0.0748 tendon_slack_length=0.064
        pennation_angle=0.08726646 activation1=120.0992 activation2=29.15452 mass=0.0379
      PathPoint P1: scapula_r (0.01771 0.00508 -0.03311)
      PathPoint P2: humerus_r (0.0183 -0.10592 -0.00605)
      PathWrap: wrap_object=deltoid
    Thelen2003Muscle delt_scap11: max_isometric_force=239 optimal_fiber_length=0.0737 tendon_slack_length=0.048
        pennation_angle=0.08726646 activation1=79.16934 activation2=23.92344 mass=0.02012
      PathPoint P1: scapula_r (0.01522 0.00824 -0.04508)
      PathPoint P2: humerus_r (0.01806 -0.09231 -0.00863)
      PathWrap: wrap_object=deltoid
    Thelen2003Muscle delt_clav_1: max_isometric_force=128 optimal_fiber_length=0.0836 tendon_slack_length=0.062
        pennation_angle=0.08726646 activation1=79.16934 activation2=23.92344 mass=0.01217
      PathPoint P1: clavicle_r (0.1509 0.02065 0.00128)
      PathPoint P2: humerus_r (0.01806 -0.09231 -0.00863)
      PathWrap: wrap_object=deltoid
    Thelen2003Muscle delt_clav_2: max_isometric_force=160 optimal_fiber_length=0.094 tendon_slack_length=0.088
        pennation_angle=0.08726646 activation1=79.16934 activation2=23.92344 mass=0.01701
      PathPoint P1: clavicle_r (0.12912 0.02578 0.00498)
      PathPoint P2: humerus_r (0.01536 -0.11883 -0.01159)
      PathWrap: wrap_object=deltoid
    Thelen2003Muscle delt_clav_3: max_isometric_force=105 optimal_fiber_length=0.0824 tendon_slack_length=0.067
        pennation_angle=0.08726646 activation1=79.16934 activation2=23.92344 mass=0.00983
      PathPoint P1: clavicle_r (0.13429 0.02229 0.00073)
      PathPoint P2: humerus_r (0.01673 -0.09943 -0.0097)
      PathWrap: wrap_object=deltoid
    Thelen2003Muscle delt_clav_4: max_isometric_force=112 optimal_fiber_length=0.0991 tendon_slack_length=0.073
        pennation_angle=0.08726646 activation1=79.16934 activation2=23.92344 mass=0.01259
      PathPoint P1: clavicle_r (0.13196 0.01641 0.00086)
      PathPoint P2: humerus_r (0.01536 -0.11883 -0.01159)
      PathWrap: wrap_object=deltoid
    Thelen2003Muscle coracobr_1: max_isometric_force=201 optimal_fiber_length=0.066 tendon_slack_length=0.092
        pennation_angle=0 activation1=79.16934 activation2=23.92344 mass=0.01506
      PathPoint P1: scapula_r (-0.00808 -0.0086 -0.07655)
      PathPoint P2: humerus_r (-0.00267 -0.14632 -0.00771)
    Thelen2003Muscle coracobr_2: max_isometric_force=148 optimal_fiber_length=0.0683 tendon_slack_length=0.104
        pennation_angle=0 activation1=133.3534 activation2=30.58104 mass=0.01151
      PathPoint P1: scapula_r (-0.01352 -0.01494 -0.07857)
      PathPoint P2: humerus_r (-0.00764 -0.16485 -0.00176)
    Thelen2003Muscle coracobr_3: max_isometric_force=114 optimal_fiber_length=0.0727 tendon_slack_length=0.113
        pennation_angle=0 activation1=133.3534 activation2=30.58104 mass=0.00939
      PathPoint P1: scapula_r (-0.00927 -0.00819 -0.0826)
      PathPoint P2: humerus_r (-0.00534 -0.17394 -0.00556)
    Thelen2003Muscle infra_1: max_isometric_force=272 optimal_fiber_length=0.0633 tendon_slack_length=0.038
        pennation_angle=0 activation1=133.3534 activation2=30.58104 mass=0.01961
      PathPoint P1: scapula_r (-0.06093 -0.04183 -0.019)
      PathPoint P2: humerus_r (0.01994 0.00982 0.01257)
      PathWrap: wrap_object=infra_cyl
    Thelen2003Muscle infra_2: max_isometric_force=275 optimal_fiber_length=0.0719 tendon_slack_length=0.107
        pennation_angle=0 activation1=133.3534 activation2=30.58104 mass=0.02245
      PathPoint P1: scapula_r (-0.12606 -0.09226 0.00115)
      PathPoint P2: humerus_r (0.01835 0.016 0.00691)
      PathWrap: wrap_object=infra_cyl
    Thelen2003Muscle infra_3: max_isometric_force=194 optimal_fiber_length=0.0677 tendon_slack_length=0.084
        pennation_angle=0 activation1=133.3534 activation2=30.58104 mass=0.01488
      PathPoint P1: scapula_r (-0.1077 -0.07258 0.00057)
      PathPoint P2: humerus_r (0.01835 0.016 0.00691)
      PathWrap: wrap_object=infra_cyl
    Thelen2003Muscle infra_4: max_isometric_force=207 optimal_fiber_length=0.0693 tendon_slack_length=0.071
        pennation_angle=0 activation1=133.3534 activation2=30.58104 mass=0.01631
      PathPoint P1: scapula_r (-0.10911 -0.04946 -0.00122)
      PathPoint P2: humerus_r (0.01605 0.01912 0.00704)
      PathWrap: wrap_object=infra_cyl
    Thelen2003Muscle infra_5: max_isometric_force=302 optimal_fiber_length=0.0698 tendon_slack_length=0.05
        pennation_angle=0 activation1=82.95686 activation2=24.57002 mass=0.02414
      PathPoint P1: scapula_r (-0.10439 -0.01708 -0.01072)
      PathPoint P2: humerus_r (0.01605 0.01912 0.00704)
      PathWrap: wrap_object=infra_cyl
    Thelen2003Muscle infra_6: max_isometric_force=182 optimal_fiber_length=0.0753 tendon_slack_length=0.035
        pennation_angle=0 activation1=82.95686 activation2=24.57002 mass=0.01564
      PathPoint P1: scapula_r (-0.0807 -0.00038 0.00044)
      PathPoint P2: humerus_r (0.01917 0.01274 0.00836)
      PathWrap: wrap_object=infra_cyl
    Thelen2003Muscle ter_min_1: max_isometric_force=122 optimal_fiber_length=0.0501 tendon_slack_length=0.049
        pennation_angle=0 activation1=82.95686 activation2=24.57002 mass=0.00714
      PathPoint P1: scapula_r (-0.0557 -0.0665 -0.01405)
      PathPoint P2: humerus_r (0.02578 -0.00703 0.0088)
      PathWrap: wrap_object=ter_min_cyl
    Thelen2003Muscle ter_min_2: max_isometric_force=195 optimal_fiber_length=0.055 tendon_slack_length=0.051
        pennation_angle=0 activation1=82.95686 activation2=24.57002 mass=0.01221
      PathPoint P1: scapula_r (-0.06585 -0.06908 -0.00647)
      PathPoint P2: humerus_r (0.02808 -0.00124 0.008)
      PathWrap: wrap_object=ter_min_cyl
    Thelen2003Muscle ter_min_3: max_isometric_force=180 optimal_fiber_length=0.0506 tendon_slack_length=0.018
        pennation_angle=0 activation1=82.95686 activation2=24.57002 mass=0.01041
      PathPoint P1: scapula_r (-0.03809 -0.04208 -0.01695)
      PathPoint P2: humerus_r (0.02578 -0.00703 0.0088)
      PathWrap: wrap_object=ter_min_cyl
    Thelen2003Muscle ter_maj_1: max_isometric_force=165 optimal_fiber_length=0.1411 tendon_slack_length=0.006
        pennation_angle=0 activation1=82.95686 activation2=24.57002 mass=0.02643
      PathPoint P1: scapula_r (-0.08743 -0.10492 -0.0131)
      PathPoint P2: humerus_r (-0.00601 -0.06556 -0.00941)
      PathWrap: wrap_object=ter_lat_pec
    Thelen2003Muscle ter_maj_2: max_isometric_force=85 optimal_fiber_length=0.1595 tendon_slack_length=0.012
        pennation_angle=0 activation1=98.40426 activation2=26.59574 mass=0.01549
      PathPoint P1: scapula_r (-0.10274 -0.11248 -0.01045)
      PathPoint P2: humerus_r (-0.00286 -0.08427 -0.00946)
      PathWrap: wrap_object=ter_lat_pec
    Thelen2003Muscle ter_maj_3: max_isometric_force=200 optimal_fiber_length=0.1526 tendon_slack_length=0.015
        pennation_angle=0 activation1=98.40426 activation2=26.59574 mass=0.03481
      PathPoint P1: scapula_r (-0.09123 -0.09007 0.00009)
      PathPoint P2: humerus_r (-0.0038 -0.07838 -0.00899)
      PathWrap: wrap_object=ter_lat_pec
    Thelen2003Muscle ter_maj_4: max_isometric_force=158 optimal_fiber_length=0.1093 tendon_slack_length=0.034
        pennation_angle=0 activation1=98.40426 activation2=26.59574 mass=0.01971
      PathPoint P1: scapula_r (-0.07965 -0.09549 -0.01112)
      PathPoint P2: humerus_r (-0.00652 -0.04977 -0.01067)
      PathWrap: wrap_object=ter_lat_pec
    Thelen2003Muscle supra_1: max_isometric_force=120 optimal_fiber_length=0.0541 tendon_slack_length=0.017
        pennation_angle=0 activation1=98.40426 activation2=26.59574 mass=0.0074
      PathPoint P1: scapula_r (-0.06032 0.00324 -0.01859)
      PathPoint P2: humerus_r (0.0232 0.01256 0.00267)
      PathWrap: wrap_object=inf_sup_sub
    Thelen2003Muscle supra_2: max_isometric_force=113 optimal_fiber_length=0.0591 tendon_slack_length=0.025
        pennation_angle=0 activation1=98.40426 activation2=26.59574 mass=0.00756
      PathPoint P1: scapula_r (-0.05964 0.01101 -0.00694)
      PathPoint P2: humerus_r (0.0232 0.01256 0.00267)
      PathWrap: wrap_object=inf_sup_sub
    Thelen2003Muscle supra_3: max_isometric_force=258 optimal_fiber_length=0.0564 tendon_slack_length=0.052
        pennation_angle=0 activation1=98.40426 activation2=26.59574 mass=0.01651
      PathPoint P1: scapula_r (-0.09439 0.02104 -0.02501)
      PathPoint P2: humerus_r (0.01229 0.01923 -0.01372)
      PathWrap: wrap_object=inf_sup_sub
    Thelen2003Muscle supra_4: max_isometric_force=130 optimal_fiber_length=0.0554 tendon_slack_length=0.031
        pennation_angle=0 activation1=63.46917 activation2=21.2766 mass=0.00819
      PathPoint P1: scapula_r (-0.07385 0.0212 -0.04032)
      PathPoint P2: humerus_r (0.01229 0.01923 -0.01372)
      PathWrap: wrap_object=inf_sup_sub
    Thelen2003Muscle subscap_1: max_isometric_force=44 optimal_fiber_length=0.0556 tendon_slack_length=0.028
        pennation_angle=0 activation1=63.46917 activation2=21.2766 mass=0.00281
      PathPoint P1: scapula_r (-0.06191 -0.01317 -0.02286)
      PathPoint P2: humerus_r (-0.0179 0.0122 -0.0149)
      PathPoint P3: humerus_r (-0.00294 0.01654 -0.01923)
      PathWrap: wrap_object=inf_sup_sub
    Thelen2003Muscle subscap_2: max_isometric_force=78 optimal_fiber_length=0.0649 tendon_slack_length=0.044
        pennation_angle=0 activation1=63.46917 activation2=21.2766 mass=0.00575
      PathPoint P1: scapula_r (-0.08371 0.01198 -0.02805)
      PathPoint P2: humerus_r (-0.0199 0.0136 -0.011)
      PathPoint P3: humerus_r (-0.00052 0.01294 -0.02164)
      PathWrap: wrap_object=inf_sup_sub
    Thelen2003Muscle subscap_3: max_isometric_force=264 optimal_fiber_length=0.0676 tendon_slack_length=0.059
        pennation_angle=0.08726646 activation1=63.46917 activation2=21.2766 mass=0.02021
      PathPoint P1: scapula_r (-0.10494 -0.01449 -0.01421)
      PathPoint P2: humerus_r (-0.0079 0.0153 -0.0192)
      PathPoint P3: humerus_r (-0.00294 0.01654 -0.01923)
      PathWrap: wrap_object=inf_sup_sub
    Thelen2003Muscle subscap_4: max_isometric_force=274 optimal_fiber_length=0.0744 tendon_slack_length=0.055
        pennation_angle=0.08726646 activation1=63.46917 activation2=21.2766 mass=0.02376
      PathPoint P1: scapula_r (-0.09383 -0.04361 -0.008)
      PathPoint P2: humerus_r (0.00035 0.00641 -0.02488)
      PathWrap: wrap_object=inf_sup_sub
    Thelen2003Muscle subscap_5: max_isometric_force=114 optimal_fiber_length=0.0797 tendon_slack_length=0.066
        pennation_angle=0 activation1=63.46917 activation2=21.2766 mass=0.01033
      PathPoint P1: scapula_r (-0.08744 -0.05705 -0.01224)
      PathPoint P2: humerus_r (0.00434 0.00857 -0.02458)
      PathWrap: wrap_object=inf_sup_sub
    Thelen2003Muscle subscap_6: max_isometric_force=149 optimal_fiber_length=0.0762 tendon_slack_length=0.077
        pennation_angle=0 activation1=78.28785 activation2=23.75297 mass=0.01292
      PathPoint P1: scapula_r (-0.10583 -0.07907 -0.00359)
      PathPoint P2: humerus_r (0.00177 0.00229 -0.02803)
      PathWrap: wrap_object=inf_sup_sub
    Thelen2003Muscle subscap_7: max_isometric_force=162 optimal_fiber_length=0.082 tendon_slack_length=0.079
        pennation_angle=0 activation1=78.28785 activation2=23.75297 mass=0.01513
      PathPoint P1: scapula_r (-0.09986 -0.09466 -0.01007)
      PathPoint P2: humerus_r (-0.00244 0.00087 -0.02664)
      PathWrap: wrap_object=inf_sup_sub
    Thelen2003Muscle subscap_8: max_isometric_force=61 optimal_fiber_length=0.0765 tendon_slack_length=0.04
        pennation_angle=0 activation1=112.5165 activation2=28.32861 mass=0.00532
      PathPoint P1: scapula_r (-0.06847 -0.06545 -0.01992)
      PathPoint P2: humerus_r (-0.00244 0.00087 -0.02664)
      PathWrap: wrap_object=inf_sup_sub
    Thelen2003Muscle subscap_9: max_isometric_force=222 optimal_fiber_length=0.0721 tendon_slack_length=0.059
        pennation_angle=0 activation1=112.5165 activation2=28.32861 mass=0.0182
      PathPoint P1: scapula_r (-0.07975 -0.0921 -0.01229)
      PathPoint P2: humerus_r (-0.00657 -0.00374 -0.02331)
      PathWrap: wrap_object=inf_sup_sub
    Thelen2003Muscle subscap10: max_isometric_force=47 optimal_fiber_length=0.0676 tendon_slack_length=0.01
        pennation_angle=0 activation1=45.41056 activation2=17.48252 mass=0.00361
      PathPoint P1: scapula_r (-0.04636 -0.05426 -0.02109)
      PathPoint P2: humerus_r (-0.00741 -0.01704 -0.01554)
      PathWrap: wrap_object=inf_sup_sub
    Thelen2003Muscle subscap11: max_isometric_force=16 optimal_fiber_length=0.0643 tendon_slack_length=0.001
        pennation_angle=0 activation1=45.41056 activation2=17.48252 mass=0.00115
      PathPoint P1: scapula_r (-0.03613 -0.04567 -0.02881)
      PathPoint P2: humerus_r (-0.00974 -0.02286 -0.01025)
      PathWrap: wrap_object=inf_sup_sub
    Thelen2003Muscle bic_l: max_isometric_force=347 optimal_fiber_length=0.1292 tendon_slack_length=0.2335
        pennation_angle=0 activation1=45.41056 activation2=17.48252 mass=0.0662
      PathPoint P1: scapula_r (-0.01401 -0.00249 -0.04288)
      PathPoint P2: humerus_r (0.0217 0.0001 -0.0011)
      PathPoint P3: radius_r (-0.00282 -0.03609 -0.01072)
      PathWrap: wrap_object=inf_sup_sub
      PathWrap: wrap_object=radius
    Thelen2003Muscle bic_b_1: max_isometric_force=173 optimal_fiber_length=0.117 tendon_slack_length=0.1913
        pennation_angle=0 activation1=45.41056 activation2=17.48252 mass=0.02079
      PathPoint P1: scapula_r (-0.00915 -0.00833 -0.08244)
      PathPoint P2: radius_r (-0.00282 -0.03609 -0.01072)
      PathWrap: wrap_object=radius
    Thelen2003Muscle bic_b_2: max_isometric_force=322 optimal_fiber_length=0.1149 tendon_slack_length=0.1927
        pennation_angle=0 activation1=45.41056 activation2=17.48252 mass=0.03107
      PathPoint P1: scapula_r (-0.00915 -0.00833 -0.08244)
      PathPoint P2: radius_r (-0.00282 -0.03609 -0.01072)
      PathWrap: wrap_object=radius
    Thelen2003Muscle tric_long_1: max_isometric_force=223 optimal_fiber_length=0.1008 tendon_slack_length=0.2041
        pennation_angle=0.1745329 activation1=62.32493 activation2=21.0084 mass=0.02697
      PathPoint P1: ulna_r (-0.01819 -0.01616 0.01247)
      PathPoint P2: scapula_r (-0.03222 -0.04378 -0.02056)
      PathWrap: wrap_object=elbow
    Thelen2003Muscle tric_long_2: max_isometric_force=296 optimal_fiber_length=0.0881 tendon_slack_length=0.2193
        pennation_angle=0.1745329 activation1=62.32493 activation2=21.0084 mass=0.02955
      PathPoint P1: ulna_r (-0.00519 -0.01833 0.00596)
      PathPoint P2: scapula_r (-0.02425 -0.04193 -0.03744)
      PathWrap: wrap_object=elbow
    Thelen2003Muscle tric_long_3: max_isometric_force=283 optimal_fiber_length=0.1183 tendon_slack_length=0.218
        pennation_angle=0.1745329 activation1=62.32493 activation2=21.0084 mass=0.02964
      PathPoint P1: ulna_r (-0.00261 -0.04828 0.00593)
      PathPoint P2: scapula_r (-0.02254 -0.03911 -0.02787)
      PathWrap: wrap_object=elbow
    Thelen2003Muscle tric_long_4: max_isometric_force=327 optimal_fiber_length=0.1226 tendon_slack_length=0.2197
        pennation_angle=0 activation1=62.32493 activation2=21.0084 mass=0.03203
      PathPoint P1: ulna_r (-0.00029 -0.0445 0.00102)
      PathPoint P2: scapula_r (-0.02425 -0.04193 -0.03744)
      PathWrap: wrap_object=elbow
    Thelen2003Muscle lat_dorsi_1: max_isometric_force=56 optimal_fiber_length=0.2343 tendon_slack_length=0.09
        pennation_angle=0 activation1=62.32493 activation2=21.0084 mass=0.01498
      PathPoint P1: thorax (0.0098 -0.126 0.1526)
      PathPoint P2: humerus_r (0.00138 -0.03789 -0.01764)
      PathWrap: wrap_object=ter_lat_pec
    Thelen2003Muscle lat_dorsi_2: max_isometric_force=88 optimal_fiber_length=0.2857 tendon_slack_length=0.083
        pennation_angle=0 activation1=62.32493 activation2=21.0084 mass=0.02883
      PathPoint P1: thorax (0.013 -0.1967 0.1482)
      PathPoint P2: humerus_r (0.00213 -0.04447 -0.01724)
      PathWrap: wrap_object=ter_lat_pec
    Thelen2003Muscle lat_dorsi_3: max_isometric_force=129 optimal_fiber_length=0.2951 tendon_slack_length=0.105
        pennation_angle=0 activation1=62.32493 activation2=21.0084 mass=0.04305
      PathPoint P1: thorax (0.0116 -0.2515 0.1392)
      PathPoint P2: humerus_r (0.00213 -0.04447 -0.01724)
      PathWrap: wrap_object=ter_lat_pec
    Thelen2003Muscle lat_dorsi_4: max_isometric_force=96 optimal_fiber_length=0.3206 tendon_slack_length=0.12
        pennation_angle=0 activation1=62.32493 activation2=21.0084 mass=0.03515
      PathPoint P1: thorax (0.0211 -0.3109 0.128)
      PathPoint P2: humerus_r (0.00138 -0.03789 -0.01764)
      PathWrap: wrap_object=ter_lat_pec
    Thelen2003Muscle lat_dorsi_5: max_isometric_force=88 optimal_fiber_length=0.3129 tendon_slack_length=0.072
        pennation_angle=0 activation1=62.32493 activation2=21.0084 mass=0.03157
      PathPoint P1: thorax (0.0792 -0.3084 0.0992)
      PathPoint P2: humerus_r (0.00138 -0.03789 -0.01764)
      PathWrap: wrap_object=ter_lat_pec
    Thelen2003Muscle lat_dorsi_6: max_isometric_force=105 optimal_fiber_length=0.3402 tendon_slack_length=0.069
        pennation_angle=0 activation1=62.32493 activation2=21.0084 mass=0.04069
      PathPoint P1: thorax (0.1042 -0.2978 0.0851)
      PathPoint P2: humerus_r (0.00213 -0.04447 -0.01724)
      PathWrap: wrap_object=ter_lat_pec
    Thelen2003Muscle pect_maj_t_1: max_isometric_force=125 optimal_fiber_length=0.1884 tendon_slack_length=0.036
        pennation_angle=0 activation1=63.46917 activation2=21.2766 mass=0.02692
      PathPoint P1: thorax (0.0612 -0.1574 -0.0321)
      PathPoint P2: humerus_r (0.01035 -0.0631 -0.01727)
      PathWrap: wrap_object=ter_lat_pec
    Thelen2003Muscle pect_maj_t_2: max_isometric_force=118 optimal_fiber_length=0.183 tendon_slack_length=0.043
        pennation_angle=0 activation1=78.28785 activation2=23.75297 mass=0.02448
      PathPoint P1: thorax (0.0279 -0.1403 -0.0392)
      PathPoint P2: humerus_r (0.01089 -0.06875 -0.01702)
      PathWrap: wrap_object=ter_lat_pec
    Thelen2003Muscle pect_maj_t_3: max_isometric_force=165 optimal_fiber_length=0.1853 tendon_slack_length=0.053
        pennation_angle=0 activation1=78.28785 activation2=23.75297 mass=0.03475
      PathPoint P1: thorax (0.0084 -0.1223 -0.0348)
      PathPoint P2: humerus_r (0.01078 -0.0738 -0.01675)
      PathWrap: wrap_object=ter_lat_pec
    Thelen2003Muscle pect_maj_t_4: max_isometric_force=157 optimal_fiber_length=0.1833 tendon_slack_length=0.028
        pennation_angle=0 activation1=112.5165 activation2=28.32861 mass=0.03301
      PathPoint P1: thorax (0.0132 -0.1006 -0.0372)
      PathPoint P2: humerus_r (0.01111 -0.06428 -0.01752)
      PathWrap: wrap_object=ter_lat_pec
    Thelen2003Muscle pect_maj_t_5: max_isometric_force=133 optimal_fiber_length=0.15 tendon_slack_length=0.026
        pennation_angle=0 activation1=112.5165 activation2=28.32861 mass=0.02273
      PathPoint P1: thorax (0.0071 -0.0418 -0.019)
      PathPoint P2: humerus_r (0.01112 -0.05418 -0.01808)
      PathWrap: wrap_object=ter_lat_pec
    Thelen2003Muscle pect_maj_t_6: max_isometric_force=198 optimal_fiber_length=0.1449 tendon_slack_length=0.036
        pennation_angle=0 activation1=45.41056 activation2=17.48252 mass=0.03243
      PathPoint P1: thorax (0.0116 -0.0227 -0.0061)
      PathPoint P2: humerus_r (0.01111 -0.06428 -0.01752)
      PathWrap: wrap_object=ter_lat_pec
    Thelen2003Muscle pect_maj_c_1: max_isometric_force=179 optimal_fiber_length=0.1363 tendon_slack_length=0.017
        pennation_angle=0 activation1=45.41056 activation2=17.48252 mass=0.02769
      PathPoint P1: clavicle_r (0.06298 0.01075 -0.01636)
      PathPoint P2: humerus_r (0.01184 -0.08869 -0.01555)
      PathWrap: wrap_object=ter_lat_pec
    Thelen2003Muscle pect_maj_c_2: max_isometric_force=113 optimal_fiber_length=0.1091 tendon_slack_length=0.014
        pennation_angle=0 activation1=45.41056 activation2=17.48252 mass=0.01399
      PathPoint P1: clavicle_r (0.08276 0.01309 -0.01496)
      PathPoint P2: humerus_r (0.01112 -0.05418 -0.01808)
      PathWrap: wrap_object=ter_lat_pec
    Thelen2003Muscle tric_med_1: max_isometric_force=263 optimal_fiber_length=0.0807 tendon_slack_length=0.0875
        pennation_angle=0.296706 activation1=45.41056 activation2=17.48252 mass=0.0184
      PathPoint P1: humerus_r (-0.00714 -0.14854 -0.00007)
      PathPoint P2: ulna_r (-0.01561 -0.00771 0.02364)
      PathWrap: wrap_object=elbow
    Thelen2003Muscle tric_med_2: max_isometric_force=256 optimal_fiber_length=0.0773 tendon_slack_length=0.1122
        pennation_angle=0 activation1=62.32493 activation2=21.0084 mass=0.01765
      PathPoint P1: humerus_r (-0.00622 -0.12402 0.00296)
      PathPoint P2: ulna_r (-0.01561 -0.00771 0.02364)
      PathWrap: wrap_object=elbow
    Thelen2003Muscle tric_med_3: max_isometric_force=240 optimal_fiber_length=0.0602 tendon_slack_length=0.0107
        pennation_angle=0 activation1=62.32493 activation2=21.0084 mass=0.01195
      PathPoint P1: humerus_r (0.00936 -0.24184 0.01321)
      PathPoint P2: ulna_r (-0.01561 -0.00771 0.02364)
      PathWrap: wrap_object=elbow
    Thelen2003Muscle tric_med_4: max_isometric_force=211 optimal_fiber_length=0.0746 tendon_slack_length=0.0404
        pennation_angle=0.1396263 activation1=62.32493 activation2=21.0084 mass=0.01395
      PathPoint P1: humerus_r (0.00264 -0.19989 0.01615)
      PathPoint P2: ulna_r (-0.01561 -0.00771 0.02364)
      PathWrap: wrap_object=elbow
    Thelen2003Muscle tric_med_5: max_isometric_force=107 optimal_fiber_length=0.0807 tendon_slack_length=0.0738
        pennation_angle=0 activation1=62.32493 activation2=21.0084 mass=0.0077
      PathPoint P1: humerus_r (-0.0058 -0.15646 0.00909)
      PathPoint P2: ulna_r (-0.01561 -0.00771 0.02364)
      PathWrap: wrap_object=elbow
    Thelen2003Muscle brachialis_1: max_isometric_force=314 optimal_fiber_length=0.0876 tendon_slack_length=0.0807
        pennation_angle=0 activation1=62.32493 activation2=21.0084 mass=0.0291
      PathPoint P1: humerus_r (0.00954 -0.14854 0.00625)
      PathPoint P2: ulna_r (-0.01536 -0.04443 -0.0061)
      PathWrap: wrap_object=elbow_circ
    Thelen2003Muscle brachialis_2: max_isometric_force=158 optimal_fiber_length=0.0953 tendon_slack_length=0.0592
        pennation_angle=0 activation1=62.32493 activation2=21.0084 mass=0.0159
      PathPoint P1: humerus_r (-0.00285 -0.154 -0.00517)
      PathPoint P2: ulna_r (-0.01911 -0.04206 -0.00329)
      PathWrap: wrap_object=elbow_circ
    Thelen2003Muscle brachialis_3: max_isometric_force=157 optimal_fiber_length=0.087 tendon_slack_length=0.0394
        pennation_angle=0 activation1=62.32493 activation2=21.0084 mass=0.01465
      PathPoint P1: humerus_r (-0.0087 -0.18035 -0.00033)
      PathPoint P2: ulna_r (-0.02492 -0.03076 -0.00037)
      PathWrap: wrap_object=elbow_circ
    Thelen2003Muscle brachialis_4: max_isometric_force=87 optimal_fiber_length=0.0758 tendon_slack_length=0.0317
        pennation_angle=0 activation1=62.32493 activation2=21.0084 mass=0.007
      PathPoint P1: humerus_r (-0.00018 -0.19078 -0.00104)
      PathPoint P2: ulna_r (-0.01581 -0.04166 -0.0046)
      PathWrap: wrap_object=elbow_circ
    Thelen2003Muscle brachialis_5: max_isometric_force=101 optimal_fiber_length=0.0619 tendon_slack_length=0.0209
        pennation_angle=0 activation1=62.32493 activation2=21.0084 mass=0.0066
      PathPoint P1: humerus_r (-0.01268 -0.22134 0.00514)
      PathPoint P2: ulna_r (-0.02218 -0.03756 -0.00186)
      PathWrap: wrap_object=elbow_circ
    Thelen2003Muscle brachialis_6: max_isometric_force=104 optimal_fiber_length=0.0472 tendon_slack_length=0.035
        pennation_angle=0 activation1=62.32493 activation2=21.0084 mass=0.0041
      PathPoint P1: humerus_r (-0.00198 -0.22967 0.00021)
      PathPoint P2: ulna_r (-0.02445 -0.03273 -0.00283)
      PathWrap: wrap_object=elbow_circ
    Thelen2003Muscle brachialis_7: max_isometric_force=118 optimal_fiber_length=0.0621 tendon_slack_length=0.0076
        pennation_angle=0 activation1=62.32493 activation2=21.0084 mass=0.0065
      PathPoint P1: humerus_r (-0.01261 -0.2366 0.00399)
      PathPoint P2: ulna_r (-0.01286 -0.03966 -0.00573)
      PathWrap: wrap_object=elbow_circ
    Thelen2003Muscle brachiorad_1: max_isometric_force=30 optimal_fiber_length=0.1613 tendon_slack_length=0.1197
        pennation_angle=0 activation1=62.32493 activation2=21.0084 mass=0.0047
      PathPoint P1: humerus_r (0.00282 -0.19968 0.00875)
      PathPoint P2: radius_r (0.00812 -0.22513 -0.07037)
    Thelen2003Muscle brachiorad_2: max_isometric_force=82 optimal_fiber_length=0.1613 tendon_slack_length=0.1197
        pennation_angle=0 activation1=62.32493 activation2=21.0084 mass=0.014
      PathPoint P1: humerus_r (0.00446 -0.2175 0.01532)
      PathPoint P2: radius_r (0.00812 -0.22513 -0.07037)
    Thelen2003Muscle brachiorad_3: max_isometric_force=52 optimal_fiber_length=0.1066 tendon_slack_length=0.1542
        pennation_angle=0 activation1=62.32493 activation2=21.0084 mass=0.00597
      PathPoint P1: humerus_r (0.006 -0.2343 0.01649)
      PathPoint P2: radius_r (0.00812 -0.22513 -0.07037)
    Thelen2003Muscle pron_teres_1: max_isometric_force=510 optimal_fiber_length=0.061 tendon_slack_length=0.0851
        pennation_angle=0 activation1=62.32493 activation2=21.0084 mass=0.0275
      PathPoint P1: humerus_r (-0.03769 -0.27686 0.00635)
      PathPoint P2: radius_r (0.02077 -0.10531 0.00781)
      PathPoint P3: radius_r (0.02077 -0.10531 0.00782)
      PathWrap: wrap_object=ulna_radius
    Thelen2003Muscle pron_teres_2: max_isometric_force=141 optimal_fiber_length=0.0391 tendon_slack_length=0.0484
        pennation_angle=0 activation1=62.32493 activation2=21.0084 mass=0.00433
      PathPoint P1: ulna_r (-0.0122 -0.02454 -0.01563)
      PathPoint P2: radius_r (0.02229 -0.08157 0.00341)
      PathWrap: wrap_object=ulna_radius
    Thelen2003Muscle supinator_1: max_isometric_force=47 optimal_fiber_length=0.0267 tendon_slack_length=0.0254
        pennation_angle=0 activation1=62.32493 activation2=21.0084 mass=0.00084
      PathPoint P1: ulna_r (0.02112 -0.08347 -0.00882)
      PathPoint P2: radius_r (0.0181 -0.08131 0.00588)
      PathWrap: wrap_object=supinator
    Thelen2003Muscle supinator_2: max_isometric_force=232 optimal_fiber_length=0.026 tendon_slack_length=0.0231
        pennation_angle=0 activation1=62.32493 activation2=21.0084 mass=0.00364
      PathPoint P1: ulna_r (0.0211 -0.0668 -0.0086)
      PathPoint P2: radius_r (0.0185 -0.0678 0.0062)
      PathWrap: wrap_object=supinator
    Thelen2003Muscle supinator_3: max_isometric_force=126 optimal_fiber_length=0.0252 tendon_slack_length=0.015
        pennation_angle=0 activation1=62.32493 activation2=21.0084 mass=0.00336
      PathPoint P1: ulna_r (0.02052 -0.05021 -0.00886)
      PathPoint P2: radius_r (0.01785 -0.05686 0.00441)
      PathWrap: wrap_object=supinator
    Thelen2003Muscle supinator_4: max_isometric_force=148 optimal_fiber_length=0.0263 tendon_slack_length=0.0145
        pennation_angle=0 activation1=62.32493 activation2=21.0084 mass=0.00296
      PathPoint P1: ulna_r (0.0193 -0.04058 -0.00751)
      PathPoint P2: radius_r (0.01614 -0.0485 0.00112)
      PathWrap: wrap_object=supinator
    Thelen2003Muscle supinator_5: max_isometric_force=285 optimal_fiber_length=0.0274 tendon_slack_length=0.0139
        pennation_angle=0.03490659 activation1=62.32493 activation2=21.0084 mass=0.00676
      PathPoint P1: ulna_r (0.01794 -0.03097 -0.00612)
      PathPoint P2: radius_r (0.01434 -0.04015 -0.00211)
      PathWrap: wrap_object=supinator
    Thelen2003Muscle pron_quad_1: max_isometric_force=73 optimal_fiber_length=0.0377 tendon_slack_length=0.001
        pennation_angle=0 activation1=62.32493 activation2=21.0084 mass=0.00163
      PathPoint P1: radius_r (0.01513 -0.20699 -0.01734)
      PathPoint P2: ulna_r (0.02616 -0.19942 -0.05486)
      PathWrap: wrap_object=pron_quad
    Thelen2003Muscle pron_quad_2: max_isometric_force=178 optimal_fiber_length=0.0386 tendon_slack_length=0.001
        pennation_angle=0 activation1=62.32493 activation2=21.0084 mass=0.00347
      PathPoint P1: radius_r (0.0165 -0.21195 -0.01749)
      PathPoint P2: ulna_r (0.03146 -0.21573 -0.06108)
      PathWrap: wrap_object=pron_quad
    Thelen2003Muscle pron_quad_3: max_isometric_force=219 optimal_fiber_length=0.0352 tendon_slack_length=0.001
        pennation_angle=0 activation1=62.32493 activation2=21.0084 mass=0.00493
      PathPoint P1: radius_r (0.0174 -0.22071 -0.02229)
      PathPoint P2: ulna_r (0.03432 -0.22684 -0.06487)
      PathWrap: wrap_object=pron_quad
    Thelen2003Muscle tric_lat_1: max_isometric_force=153 optimal_fiber_length=0.0758 tendon_slack_length=0.1707
        pennation_angle=0 activation1=62.32493 activation2=21.0084 mass=0.0125
      PathPoint P1: humerus_r (0.00631 -0.05495 0.011)
      PathPoint P2: ulna_r (-0.01587 0.00793 0.0209)
      PathWrap: wrap_object=elbow
    Thelen2003Muscle tric_lat_2: max_isometric_force=410 optimal_fiber_length=0.0766 tendon_slack_length=0.177
        pennation_angle=0.08726646 activation1=62.32493 activation2=21.0084 mass=0.0332
      PathPoint P1: humerus_r (0.00631 -0.05495 0.011)
      PathPoint P2: ulna_r (-0.01498 0.0054 0.0221)
      PathWrap: wrap_object=elbow
    Thelen2003Muscle tric_lat_3: max_isometric_force=219 optimal_fiber_length=0.0656 tendon_slack_length=0.1911
        pennation_angle=0.1745329 activation1=62.32493 activation2=21.0084 mass=0.0152
      PathPoint P1: humerus_r (0.00631 -0.05495 0.011)
      PathPoint P2: ulna_r (-0.0058 0 0.02015)
      PathWrap: wrap_object=elbow
    Thelen2003Muscle tric_lat_4: max_isometric_force=275 optimal_fiber_length=0.0638 tendon_slack_length=0.157
        pennation_angle=0.1745329 activation1=62.32493 activation2=21.0084 mass=0.0162
      PathPoint P1: humerus_r (0.01211 -0.09512 0.01048)
      PathPoint P2: ulna_r (-0.0058 0 0.02015)
      PathWrap: wrap_object=elbow
    Thelen2003Muscle tric_lat_5: max_isometric_force=87 optimal_fiber_length=0.0638 tendon_slack_length=0.157
        pennation_angle=0.296706 activation1=62.32493 activation2=21.0084 mass=0.00585
      PathPoint P1: humerus_r (0.01211 -0.09512 0.01048)
      PathPoint P2: ulna_r (-0.00814 0.00406 0.01884)
      PathWrap: wrap_object=elbow
    Thelen2003Muscle anconeus_1: max_isometric_force=31 optimal_fiber_length=0.0252 tendon_slack_length=0.0064
        pennation_angle=0 activation1=62.32493 activation2=21.0084 mass=0.00083
      PathPoint P1: humerus_r (0.01337 -0.29227 0.01291)
      PathPoint P2: ulna_r (0.0065 -0.02074 0.01047)
    Thelen2003Muscle anconeus_2: max_isometric_force=70 optimal_fiber_length=0.0202 tendon_slack_length=0.008
        pennation_angle=0.2617994 activation1=62.32493 activation2=21.0084 mass=0.0015
      PathPoint P1: humerus_r (0.01153 -0.29614 0.01149)
      PathPoint P2: ulna_r (0.00769 -0.02394 0.00924)
    Thelen2003Muscle anconeus_3: max_isometric_force=25 optimal_fiber_length=0.0228 tendon_slack_length=0.0043
        pennation_angle=0 activation1=62.32493 activation2=21.0084 mass=0.0006
      PathPoint P1: humerus_r (0.01201 -0.28689 0.01448)
      PathPoint P2: ulna_r (0.0053 -0.01763 0.01169)
    Thelen2003Muscle anconeus_4: max_isometric_force=118 optimal_fiber_length=0.027 tendon_slack_length=0.03
        pennation_angle=0.3141593 activation1=62.32493 activation2=21.0084 mass=0.0022
      PathPoint P1: humerus_r (0.01592 -0.29678 0.00632)
      PathPoint P2: ulna_r (0.0153 -0.05532 0.00283)
    Thelen2003Muscle anconeus_5: max_isometric_force=118 optimal_fiber_length=0.0266 tendon_slack_length=0.02
        pennation_angle=0.4014257 activation1=62.32493 activation2=21.0084 mass=0.00333
      PathPoint P1: humerus_r (0.01446 -0.29765 0.00818)
      PathPoint P2: ulna_r (0.0109 -0.04041 0.00689)
  BodySet:
    Body ground: mass=0 mass_center=(0 0 0) inertia_xx=0 inertia_yy=0 inertia_zz=0 meshes=ground_ribs.vtp
    Body thorax: mass=20 mass_center=(0 -0.1486 0.0591) inertia_xx=1.29841 inertia_yy=0.55245 inertia_zz=1.29841
      WeldJoint base: parent_body=ground location_in_parent=(0 0 0) location=(0 0 0)
      WrapEllipsoid serr_ant: dimensions=(0.147 0.2079 0.0944) translation=(0 -0.1486 0.0591)
    Body clavicle_1: mass=0 mass_center=(0 0 0) inertia_xx=0 inertia_yy=0 inertia_zz=0
      CustomJoint sc1: parent_body=thorax location_in_parent=(0.0014 -0.0152 0.0028) location=(0 0 0)
        Coordinate SC_y: default_value=-0.5844408 initial_value=-0.5844408 range=(-1.047198 -0.1745329)
            keys=(s_key middlemouse_button) clamped=false
        SpatialTransform: axes_held_at_zero=(rotation2 rotation3 translation1 translation2 translation3)
          TransformAxis rotation1: axis=(0 1 0) coordinates=SC_y LinearFunction(coefficients=1 0)
    Body clavicle_2: mass=0 mass_center=(0 0 0) inertia_xx=0 inertia_yy=0 inertia_zz=0
      CustomJoint sc2: parent_body=clavicle_1 location_in_parent=(0 0 0) location=(0 0 0)
        Coordinate SC_z: default_value=0.03744168 initial_value=0.03744168 range=(-0.08726646 0.6981317)
            keys=(s_key rightmouse_button) clamped=false
        SpatialTransform: axes_held_at_zero=(rotation1 rotation3 translation1 translation2 translation3)
          TransformAxis rotation2: axis=(0 0 1) coordinates=SC_z LinearFunction(coefficients=1 0)
    Body clavicle_r: mass=0.156 mass_center=(0.0983 0.0167 0.0042) inertia_xx=0.0000064 inertia_yy=0.0000263
        inertia_zz=0.0000243 inertia_xy=-0.0000067 inertia_xz=-0.0000095 inertia_yz=0.0000029 meshes=rclavicle.vtp
      CustomJoint sc3: parent_body=clavicle_2 location_in_parent=(0 0 0) location=(0 0 0)
        Coordinate SC_x: default_value=0.5744638 initial_value=0.5744638 range=(0 1.48353)
            keys=(s_key leftmouse_button) clamped=false
        SpatialTransform: axes_held_at_zero=(rotation1 rotation2 translation1 translation2 translation3)
          TransformAxis rotation3: axis=(1 0 0) coordinates=SC_x LinearFunction(coefficients=1 0)
    Body scapula_1: mass=0 mass_center=(0 0 0) inertia_xx=0 inertia_yy=0 inertia_zz=0
      CustomJoint ac1: parent_body=clavicle_r location_in_parent=(0.2077 -0.0001 0.0282) location=(0 0 0)
        Coordinate AC_y: default_value=0.7953626 initial_value=0.7953626 range=(0.5235988 1.22173)
            keys=(a_key middlemouse_button) clamped=false
        SpatialTransform: axes_held_at_zero=(rotation2 rotation3 translation1 translation2 translation3)
          TransformAxis rotation1: axis=(0 1 0) coordinates=AC_y LinearFunction(coefficients=1 0)
    Body scapula_2: mass=0 mass_center=(0 0 0) inertia_xx=0 inertia_yy=0 inertia_zz=0
      CustomJoint ac2: parent_body=scapula_1 location_in_parent=(0 0 0) location=(0 0 0)
        Coordinate AC_z: default_value=0.00799797 initial_value=0.00799797 range=(-0.3490659 0.1745329)
            keys=(a_key rightmouse_button) clamped=false
        SpatialTransform: axes_held_at_zero=(rotation1 rotation3 translation1 translation2 translation3)
          TransformAxis rotation2: axis=(0 0 1) coordinates=AC_z LinearFunction(coefficients=1 0)
    Body scapula_r: mass=0.7054 mass_center=(-0.053 -0.0229 -0.0247) inertia_xx=0.001 inertia_yy=0.001 inertia_zz=0.001
        meshes=rscapula.vtp
      CustomJoint ac3: parent_body=scapula_2 location_in_parent=(0 0 0) location=(0 0 0)
        Coordinate AC_x: default_value=-0.2105165 initial_value=-0.2105165 range=(-0.3490659 0.3490659)
            keys=(a_key leftmouse_button) clamped=false
        SpatialTransform: axes_held_at_zero=(rotation1 rotation2 translation1 translation2 translation3)
          TransformAxis rotation3: axis=(1 0 0) coordinates=AC_x LinearFunction(coefficients=1 0)
    Body humerus_1: mass=0 mass_center=(0 0 0) inertia_xx=0 inertia_yy=0 inertia_zz=0
      CustomJoint gh1: parent_body=scapula_r location_in_parent=(0.002 -0.023 -0.0439) location=(0 0 0)
        Coordinate GH_y: default_value=-0.6646999 initial_value=0.7655775 range=(-3.141593 3.141593)
            keys=(g_key rightmouse_button) clamped=false
        SpatialTransform: axes_held_at_zero=(rotation1 rotation3 translation1 translation2 translation3)
          TransformAxis rotation2: axis=(0 1 0) coordinates=GH_y LinearFunction(coefficients=1 0)
    Body humerus_2: mass=0 mass_center=(0 0 0) inertia_xx=0 inertia_yy=0 inertia_zz=0
      CustomJoint gh2: parent_body=humerus_1 location_in_parent=(0 0 0) location=(0 0 0)
        Coordinate GH_z: default_value=-0.00379958 initial_value=0.3672558 range=(-0.3490659 1.570796)
            keys=(g_key leftmouse_button) clamped=false
        SpatialTransform: axes_held_at_zero=(rotation1 rotation2 translation1 translation2 translation3)
          TransformAxis rotation3: axis=(0 0 1) coordinates=GH_z LinearFunction(coefficients=1 0)
    Body humerus_r: mass=2.0519 mass_center=(0.0064 -0.0776 -0.0036) inertia_xx=0.0132 inertia_yy=0.001988
        inertia_zz=0.0132 meshes=rhumerus.vtp
      CustomJoint gh3: parent_body=humerus_2 location_in_parent=(0 0 0) location=(0 0 0)
        Coordinate GH_yy: default_value=-0.6049077 initial_value=-0.6049077 range=(-3.141593 3.141593)
            keys=(g_key middlemouse_button) clamped=false
        SpatialTransform: axes_held_at_zero=(rotation1 rotation3 translation1 translation2 translation3)
          TransformAxis rotation2: axis=(0 1 0) coordinates=GH_yy LinearFunction(coefficients=1 0)
      WrapSphere deltoid: radius=0.0272 xyz_body_rotation=(-0.1930334 -0.2380629 -0.3857178)
          translation=(0.0022 -0.0009 -0.0018)
      WrapSphere inf_sup_sub: radius=0.0231 xyz_body_rotation=(-0.1930334 -0.2380629 -0.3857178)
          translation=(-0.0017 0.0018 -0.0013)
      WrapCylinder infra_cyl: radius=0.014 length=0.12 xyz_body_rotation=(1.566433 0.00610865 -0.9531243)
          translation=(0.0054 -0.023 -0.0044) quadrant=-x
      WrapCylinder ter_min_cyl: radius=0.015 length=0.1 xyz_body_rotation=(1.566433 0.00610865 -1.476723)
          translation=(0.0054 -0.023 -0.0044) quadrant=-x
      WrapCylinder ter_lat_pec: radius=0.01 length=0.1 xyz_body_rotation=(1.566433 0.00610865 -0.9531243)
          translation=(0.0057 -0.073 -0.0042)
    Body ulna_r: mass=0.5464 mass_center=(-0.0003 -0.0634 -0.0039) inertia_xx=0.0030585 inertia_yy=0.00045325
        inertia_zz=0.0030585 meshes=rulna.vtp
      CustomJoint hu: parent_body=humerus_r location_in_parent=(0.0058 -0.2907 0.0049) location=(0 0 0)
        Coordinate EL_x: default_value=0.08726646 initial_value=0.08726646 range=(0.08726646 2.443461)
            keys=(e_key leftmouse_button) clamped=false
        SpatialTransform: axes_held_at_zero=(rotation2 rotation3 translation1 translation2 translation3)
          TransformAxis rotation1: axis=(0.9997661 0.008446 -0.019909) coordinates=EL_x
              LinearFunction(coefficients=1 0)
      WrapCylinder elbow: radius=0.019 length=0.05 xyz_body_rotation=(-2.511529 1.546536 2.792527) translation=(0 0 0)
          quadrant=y
      WrapCylinder elbow_circ: radius=0.015 length=0.05 xyz_body_rotation=(0.6300639 -1.546536 0) translation=(0 0 0)
      WrapCylinder pron_quad: radius=0.007 length=0.1 xyz_body_rotation=(-1.288053 -0.2326524 0)
          translation=(0.0365 -0.2064 -0.0577) quadrant=y
    Body radius_r: mass=0.5464 mass_center=(0.0106 -0.1179 -0.0129) inertia_xx=0.0030585 inertia_yy=0.00045325
        inertia_zz=0.0030585 meshes=rradius.vtp
      CustomJoint ur: parent_body=ulna_r location_in_parent=(0.0171 -0.0133 -0.0163) location=(0 0 0)
        Coordinate PS_y: default_value=0.08726646 initial_value=0.08726646 range=(0.08726646 2.792527)
            keys=(p_key leftmouse_button) clamped=false
        SpatialTransform: axes_held_at_zero=(rotation2 rotation3 translation1 translation2 translation3)
          TransformAxis rotation1: axis=(-0.113295 0.9740588 0.195892) coordinates=PS_y
              LinearFunction(coefficients=1 0)
      WrapCylinder radius: radius=0.0092 length=0.2 xyz_body_rotation=(-1.612859 -0.2022837 -1.777094)
          translation=(0.0035 -0.0322 -0.0003) quadrant=-x
      WrapCylinder supinator: radius=0.009 length=0.2 xyz_body_rotation=(-1.488766 0.00174533 0)
          translation=(0.0034 -0.1196 -0.0069) quadrant=-y
      WrapCylinder ulna_radius: radius=0.0071 length=0.1 xyz_body_rotation=(1.540951 0.2562143 2.670354)
          translation=(0.0146 -0.0891 0.0003) quadrant=-x
    Body hand_r: mass=0.525 mass_center=(0.0006 -0.0905 -0.0365) inertia_xx=0.0006387 inertia_yy=0.0001904
        inertia_zz=0.0006387
      WeldJoint rc: parent_body=radius_r location_in_parent=(0.0169 -0.2251 -0.0712) location=(0 0 0)
  ComponentSet:
    VisualizeGH GHforce
